<?xml version="1.0"?>
<propeller name="prop">
  <ixx> 3.1983 </ixx>
  <diameter unit="IN"> 78.0 </diameter>
  <numblades> 3 </numblades>
  <gearratio>1.0</gearratio>
  <minpitch> 12 </minpitch>
  <maxpitch> 30 </maxpitch>
  <minrpm>   2454 </minrpm>
  <maxrpm>   2700 </maxrpm>

  <table name="C_THRUST" type="internal">
      <tableData>
                12         30
       0.0      0.0480   0.0880
       0.1      0.0440   0.0880
       0.2      0.0400   0.0880
       0.3      0.0332   0.0876
       0.4      0.0253   0.0872
       0.5      0.0172   0.0860
       0.6      0.0074   0.0814
       0.7      -0.0006   0.0732
       0.8      -0.0142   0.0650
       1.0      -0.0308   0.0432
       1.2      -0.0504   0.0231
       1.4      -0.0690   0.0017
       1.6      -0.0903   -0.0189
       1.8      -0.1105   -0.0394
       2.0      -0.1297   -0.0609
       2.2      -0.1489   -0.0827
       2.4      -0.1681   -0.1048
      </tableData>
  </table>

  <table name="C_POWER" type="internal">
     <tableData>
                12         30
       0.0      0.0559   0.1159
       0.1      0.0559   0.1159
       0.2      0.0532   0.1159
       0.3      0.0506   0.1159
       0.4      0.0445   0.1159
       0.5      0.0366   0.1146
       0.6      0.0297   0.1133
       0.7      0.0175   0.1108
       0.8      0.0070   0.1055
       1.0      -0.0209   0.0862
       1.2      -0.0610   0.0579
       1.4      -0.1134   0.0290
       1.6      -0.1676   -0.0025
       1.8      -0.2234   -0.0707
       2.0      -0.2793   -0.1413
       2.2      -0.3351   -0.2120
       2.4      -0.3910   -0.2827
     </tableData>
  </table>

</propeller>
